# OpenSim document version 10600
Model arm26_with_bucket:
  credits: Model authors names..
  publications: List of publications related to model...
  length_units: meters
  force_units: N
  defaults: Thelen2003Muscle default: muscle_model=9 max_isometric_force=546 optimal_fiber_length=0.0535
      tendon_slack_length=0.078 pennation_angle=0 activation_time_constant=0.01 deactivation_time_constant=0.04 Vmax=10
      Vmax0=5 FmaxTendonStrain=0.033 FmaxMuscleStrain=0.6 KshapeActive=0.5 KshapePassive=4 damping=0.05 Af=0.3 Flen=1.8
  DynamicsEngine:
    SimbodyEngine default: gravity=(0 -9.80665 0)
      BodySet:
        Body ground: mass=0 mass_center=(0 0 0) inertia_xx=0 inertia_yy=0 inertia_zz=0
            meshes=(ground_ribs.vtp ground_spine.vtp ground_skull.vtp ground_jaw.vtp ground_r_clavicle.vtp ground_r_scapula.vtp)
          WrapCylinder TRIlongglen: xyz_body_rotation=(1.375319 -0.2946116 2.435956)
              translation=(-0.043905 -0.0039 0.1478) quadrant=x radius=0.003 length=0.03
        Body r_humerus: mass=1.864572 mass_center=(0 -0.180496 0) inertia_xx=0.01481 inertia_yy=0.004551
            inertia_zz=0.013193 meshes=arm_r_humerus.vtp
          WrapEllipsoid TRIlonghh: xyz_body_rotation=(3.001617 -0.853466 2.574186)
              translation=(-0.0078 -0.0041 -0.0014) quadrant=z dimensions=(0.035 0.02 0.02)
          WrapEllipsoid BIClonghh: xyz_body_rotation=(-2.004336 -1.001644 0.9754645) translation=(0.0033 0.0073 0.0003)
              quadrant=-y dimensions=(0.025 0.02 0.02)
          WrapCylinder TRI: xyz_body_rotation=(-0.1401499 -0.00628319 0.1549852) translation=(0.0028 -0.2919 -0.0069)
              quadrant=all radius=0.016 length=0.05
          CustomJoint r_shoulder: parent_body=ground location_in_parent=(-0.017545 -0.007 0.17) location=(0 0 0)
            Coordinate r_shoulder_elev: default_value=0 initial_value=0 tolerance=0 stiffness=0
                range=(-1.570796 3.141593) keys=(s_key leftmouse_button) clamped=true restraint_active=false
            TransformAxis r2: coordinate=r_shoulder_elev axis=(-0.05889802 0.0023 0.9982614)
        Body r_ulna_radius_hand: mass=1.534315 mass_center=(0 -0.181479 0) inertia_xx=0.019281 inertia_yy=0.001571
            inertia_zz=0.020062
            meshes=(arm_r_ulna.vtp arm_r_radius.vtp arm_r_lunate.vtp arm_r_scaphoid.vtp arm_r_pisiform.vtp arm_r_triquetrum.vtp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)
          CustomJoint r_elbow: parent_body=r_humerus location_in_parent=(0.0061 -0.2904 -0.0123) location=(0 0 0)
            Coordinate r_elbow_flex: default_value=0 initial_value=0 tolerance=0 stiffness=0 range=(0 2.268928)
                keys=(e_key leftmouse_button) clamped=true restraint_active=false
            TransformAxis r3: coordinate=r_elbow_flex axis=(0.04940001 0.03660001 0.9981083)
        Body bucket: mass=1 mass_center=(0 -0.1 0) inertia_xx=0.00223958 inertia_yy=0.0028125 inertia_zz=0.00223958
            meshes=bucket.vtp
          CustomJoint r_handle: parent_body=r_ulna_radius_hand location_in_parent=(0.031 -0.31 0.07) location=(0 0 0)
            Coordinate r_handle_rot: default_value=0 initial_value=0 tolerance=0 stiffness=0 range=(-3.141593 3.141593)
                keys=(e_key leftmouse_button) clamped=true restraint_active=false
            TransformAxis r3: coordinate=r_handle_rot axis=(0.04940001 0.03660001 0.9981083)
              # Specify axis direction(e.g., 0.04940001       0.03660001       0.99810825)
        # Add new Body and Joint above
      MarkerSet:
        Marker r_acromion: ground (-0.01256 0.04 0.17)
        Marker r_humerus_epicondyle: r_humerus (0.005 -0.2904 0.03)
        Marker r_radius_styloid: r_ulna_radius_hand (-0.0011 -0.23559 0.0943)
  ActuatorSet:
    Thelen2003Muscle [values shared by the 6 below unless stated]: muscle_model=9 activation_time_constant=0.01
        deactivation_time_constant=0.04 Vmax=10 Vmax0=5 FmaxTendonStrain=0.033 FmaxMuscleStrain=0.6 KshapeActive=0.5
        KshapePassive=4 damping=0.05 Af=0.3 Flen=1.8
    Thelen2003Muscle TRIlong: max_isometric_force=798.52 optimal_fiber_length=0.134 tendon_slack_length=0.143
        pennation_angle=0.2094395
      MusclePoint P1: ground (-0.05365 -0.01373 0.14723)
      MusclePoint P2: r_humerus (-0.02714 -0.11441 -0.00664)
      MusclePoint P3: r_humerus (-0.03184 -0.22637 -0.01217)
      MusclePoint P4: r_humerus (-0.01743 -0.26757 -0.01208)
      MusclePoint P5: r_ulna_radius_hand (-0.0219 0.01046 -0.00078)
      MuscleWrap: wrap_object=TRI method=hybrid
      MuscleWrap: wrap_object=TRIlonghh method=hybrid
      MuscleWrap: wrap_object=TRIlongglen method=hybrid
    Thelen2003Muscle TRIlat: max_isometric_force=624.3 optimal_fiber_length=0.1138 tendon_slack_length=0.098
        pennation_angle=0.1570796
      MusclePoint P1: r_humerus (-0.00599 -0.12646 0.00428)
      MusclePoint P2: r_humerus (-0.02344 -0.14528 0.00928)
      MusclePoint P3: r_humerus (-0.03184 -0.22637 -0.01217)
      MusclePoint P4: r_humerus (-0.01743 -0.26757 -0.01208)
      MusclePoint P5: r_ulna_radius_hand (-0.0219 0.01046 -0.00078)
      MuscleWrap: wrap_object=TRI method=hybrid
    Thelen2003Muscle TRImed: max_isometric_force=624.3 optimal_fiber_length=0.1138 tendon_slack_length=0.0908
        pennation_angle=0.1570796
      MusclePoint P1: r_humerus (-0.00838 -0.13695 -0.00906)
      MusclePoint P2: r_humerus (-0.02601 -0.15139 -0.0108)
      MusclePoint P3: r_humerus (-0.03184 -0.22637 -0.01217)
      MusclePoint P4: r_humerus (-0.01743 -0.26757 -0.01208)
      MusclePoint P5: r_ulna_radius_hand (-0.0219 0.01046 -0.00078)
      MuscleWrap: wrap_object=TRI method=hybrid
    Thelen2003Muscle BIClong: max_isometric_force=624.3 optimal_fiber_length=0.1157 tendon_slack_length=0.2723
        pennation_angle=0
      MusclePoint P1: ground (-0.039235 0.00347 0.14795)
      MusclePoint P2: ground (-0.028945 0.01391 0.15639)
      MusclePoint P3: r_humerus (0.02131 0.01793 0.01028)
      MusclePoint P4: r_humerus (0.02378 -0.00511 0.01201)
      MusclePoint P5: r_humerus (0.01345 -0.02827 0.00136)
      MusclePoint P6: r_humerus (0.01068 -0.07736 -0.00165)
      MusclePoint P7: r_humerus (0.01703 -0.12125 0.00024)
      MusclePoint P8: r_humerus (0.0228 -0.1754 -0.0063)
      MusclePoint P9: r_ulna_radius_hand (0.00751 -0.04839 0.02179)
      MuscleWrap: wrap_object=BIClonghh method=hybrid range=(2 3)
    Thelen2003Muscle BICshort: max_isometric_force=435.56 optimal_fiber_length=0.1321 tendon_slack_length=0.1923
        pennation_angle=0
      MusclePoint P1: ground (0.004675 -0.01231 0.13475)
      MusclePoint P2: ground (-0.007075 -0.04004 0.14507)
      MusclePoint P3: r_humerus (0.01117 -0.07576 -0.01101)
      MusclePoint P4: r_humerus (0.01703 -0.12125 -0.01079)
      MusclePoint P5: r_humerus (0.0228 -0.1754 -0.0063)
      MusclePoint P6: r_ulna_radius_hand (0.00751 -0.04839 0.02179)
    Thelen2003Muscle BRA: max_isometric_force=987.26 optimal_fiber_length=0.0858 tendon_slack_length=0.0535
        pennation_angle=0
      MusclePoint P1: r_humerus (0.0068 -0.1739 -0.0036)
      MusclePoint P2: r_ulna_radius_hand (-0.0032 -0.0239 0.0009)
      MuscleWrap: wrap_object=TRI method=hybrid
