Model 3DGaitModelSimple:
  length_units: meters
  force_units: N
  defaults: SimmDarrylMuscle default: muscle_model=9 max_isometric_force=0 optimal_fiber_length=0 tendon_slack_length=0
      pennation_angle=0 activation_time_constant=0.01 deactivation_time_constant=0.04 Vmax=10 Vmax0=5
      FmaxTendonStrain=0.033 FmaxMuscleStrain=0.6 KshapeActive=0.5 KshapePassive=4 damping=0.05 Af=0.3 Flen=1.8
  DynamicsEngine:
    SdfastEngine: gravity=(0 -9.80665 0) model_library=gait23
      BodySet:
        SdfastBody ground: mass=0 mass_center=(0 0 0) inertia=(0 0 0 0 0 0 0 0 0) index=-1
        SdfastBody pelvis: mass=11.34498 mass_center=(-0.0724376 0 0)
            inertia=(0.1039565 0 0 0 0.08807986 0 0 0 0.05855136) index=0 meshes=(sacrum2.vtp pelvis.vtp l_pelvis.vtp)
        SdfastBody femur_r: mass=8.960197 mass_center=(0 -0.1950308 0)
            inertia=(0.169769 0 0 0 0.04450255 0 0 0 0.1790245) index=1 meshes=femur.vtp
        SdfastBody tibia_r: mass=3.571498 mass_center=(0 -0.1845572 0)
            inertia=(0.04744313 0 0 0 0.00480079 0 0 0 0.04810206) index=2 meshes=(tibia.vtp fibula.vtp)
        SdfastBody patella_r: mass=0.0963317 mass_center=(0 0 0) inertia=(0.00110421 0 0 0 0.00110421 0 0 0 0.00110421)
            index=3 meshes=pat.vtp
        SdfastBody talus_r: mass=0.0963317 mass_center=(0 0 0) inertia=(0.00119543 0 0 0 0.00119543 0 0 0 0.00119543)
            index=4 meshes=talus.vtp
        SdfastBody calcn_r: mass=1.204146 mass_center=(0.1027085 0.03081254 0)
            inertia=(0.00142269 0 0 0 0.0039632 0 0 0 0.00416645) index=5 meshes=foot.vtp
        SdfastBody toes_r: mass=0.2086545 mass_center=(0.03553713 0.00616251 -0.01797398)
            inertia=(0.00010162 0 0 0 0.00020324 0 0 0 0.00101621) index=6 meshes=bofoot.vtp
        SdfastBody femur_l: mass=8.960197 mass_center=(0 -0.1950308 0)
            inertia=(0.169769 0 0 0 0.04450255 0 0 0 0.1790245) index=7 meshes=l_femur.vtp
        SdfastBody tibia_l: mass=3.571498 mass_center=(0 -0.1845572 0)
            inertia=(0.04744313 0 0 0 0.00480079 0 0 0 0.04810206) index=8 meshes=(l_tibia.vtp l_fibula.vtp)
        SdfastBody patella_l: mass=0.0963317 mass_center=(0 0 0) inertia=(0.00110421 0 0 0 0.00110421 0 0 0 0.00110421)
            index=9 meshes=l_patella.vtp
        SdfastBody talus_l: mass=0.0963317 mass_center=(0 0 0) inertia=(0.00119543 0 0 0 0.00119543 0 0 0 0.00119543)
            index=10 meshes=l_talus.vtp
        SdfastBody calcn_l: mass=1.204146 mass_center=(0.1027085 0.03081254 0)
            inertia=(0.00142269 0 0 0 0.0039632 0 0 0 0.00416645) index=11 meshes=l_foot.vtp
        SdfastBody toes_l: mass=0.2086545 mass_center=(0.03553713 0.00616251 0.01797398)
            inertia=(0.00010162 0 0 0 0.00020324 0 0 0 0.00101621) index=12 meshes=l_bofoot.vtp
        SdfastBody torso: mass=32.9807 mass_center=(0.03030761 0.3455104 0.0141238)
            inertia=(1.655908 0 0 0 0.8484493 0 0 0 1.607505) index=13
            meshes=(hat_spine.vtp hat_jaw.vtp hat_skull.vtp hat_ribs.vtp)
      JointSet:
        SdfastJoint ground_pelvis: bodies=(ground pelvis) location_in_parent=(0 0 0) location_in_child=(0 0 0) index=0
            sdfast_type=bushing
        SdfastJoint hip_r: bodies=(pelvis femur_r) location_in_parent=(-0.0724376 -0.06772454 0.08555218)
            location_in_child=(0 0 0) index=1 sdfast_type=gimbal
        SdfastJoint knee_r: bodies=(femur_r tibia_r) location_in_parent=(0 0 0) location_in_child=(0 0 0) index=2
            sdfast_type=planar
        SdfastJoint tib_pat_r: bodies=(tibia_r patella_r) location_in_parent=(0 0 0.00237246) location_in_child=(0 0 0)
            index=3 sdfast_type=planar
        SdfastJoint ankle_r: bodies=(tibia_r talus_r) location_in_parent=(0 -0.4250649 0) location_in_child=(0 0 0)
            index=4 sdfast_type=pin
        SdfastJoint subtalar_r: bodies=(talus_r calcn_r) location_in_parent=(-0.05432871 -0.04673138 0.00882271)
            location_in_child=(0 0 0) index=5 sdfast_type=pin
        SdfastJoint mtp_r: bodies=(calcn_r toes_r) location_in_parent=(0.1836428 -0.00205417 0.00110925)
            location_in_child=(0 0 0) index=6 sdfast_type=pin
        SdfastJoint hip_l: bodies=(pelvis femur_l) location_in_parent=(-0.0724376 -0.06772454 -0.08555218)
            location_in_child=(0 0 0) index=7 sdfast_type=gimbal
        SdfastJoint knee_l: bodies=(femur_l tibia_l) location_in_parent=(0 0 0) location_in_child=(0 0 0) index=8
            sdfast_type=planar
        SdfastJoint tib_pat_l: bodies=(tibia_l patella_l) location_in_parent=(0 0 -0.00237246)
            location_in_child=(0 0 0) index=9 sdfast_type=planar
        SdfastJoint ankle_l: bodies=(tibia_l talus_l) location_in_parent=(0 -0.4250649 0) location_in_child=(0 0 0)
            index=10 sdfast_type=pin
        SdfastJoint subtalar_l: bodies=(talus_l calcn_l) location_in_parent=(-0.05432871 -0.04673138 -0.00882271)
            location_in_child=(0 0 0) index=11 sdfast_type=pin
        SdfastJoint mtp_l: bodies=(calcn_l toes_l) location_in_parent=(0.1836428 -0.00205417 -0.00110925)
            location_in_child=(0 0 0) index=12 sdfast_type=pin
        SdfastJoint back: bodies=(pelvis torso) location_in_parent=(-0.1031749 0.08350303 0) location_in_child=(0 0 0)
            index=13 sdfast_type=gimbal
      SdfastCoordinate [values shared by the 33 below unless stated]: tolerance=0 stiffness=0 clamped=true
          restraint_active=true
      SdfastCoordinate pelvis_tz: default_value=0 initial_value=0 range=(-3 3) q_type=0 index=0 joint=0 axis=0
          constraint_number=-1
      SdfastCoordinate pelvis_tx: default_value=0.12 initial_value=0.12 range=(-5 5) q_type=0 index=1 joint=0 axis=1
          constraint_number=-1
      SdfastCoordinate pelvis_ty: default_value=0.93 initial_value=0.93 range=(-1 2) q_type=0 index=2 joint=0 axis=2
          constraint_number=-1
      SdfastCoordinate pelvis_tilt: default_value=0 initial_value=0 range=(-1.570796 1.570796) q_type=0 index=3 joint=0
          axis=3 constraint_number=-1
      SdfastCoordinate pelvis_list: default_value=0 initial_value=0 range=(-1.570796 1.570796) q_type=0 index=4 joint=0
          axis=4 constraint_number=-1
      SdfastCoordinate pelvis_rotation: default_value=0 initial_value=0 range=(-1.570796 1.570796) q_type=0 index=5
          joint=0 axis=5 constraint_number=-1
      SdfastCoordinate hip_flexion_r: default_value=0 initial_value=0 range=(-2.094395 2.094395) q_type=0 index=6
          joint=1 axis=0 constraint_number=-1
      SdfastCoordinate hip_adduction_r: default_value=0 initial_value=0 range=(-2.094395 2.094395) q_type=0 index=7
          joint=1 axis=1 constraint_number=-1
      SdfastCoordinate hip_rotation_r: default_value=0 initial_value=0 range=(-2.094395 2.094395) q_type=0 index=8
          joint=1 axis=2 constraint_number=-1
      SdfastCoordinate knee_r_tx: default_value=-0.00516241 initial_value=-0.00516241 range=(-999999.9 999999.9)
          q_type=1 index=9 joint=2 axis=0 constraint_independent_coordinate=knee_angle_r constraint_number=0
        constraint_function: natCubicSpline: min_x=0 max_x=0 min_y=0 max_y=0 min_z=0 max_z=0
            x=(-2.094395 -1.745329 -1.396263 -1.047198 -0.6981317 -0.3490659 -0.1745329 0.1973442 0.337395 0.4901776 1.52146 2.094395)
            y=(-0.00367117 0.00205356 0.00471516 0.00470368 0.00243215 -0.00114724 -0.00355644 -0.00599662 -0.00623525 -0.00639472 -0.00623525 -0.00602301)
      SdfastCoordinate knee_r_ty: default_value=-0.4541013 initial_value=-0.4541013 range=(-999999.9 999999.9) q_type=1
          index=10 joint=2 axis=1 constraint_independent_coordinate=knee_angle_r constraint_number=1
        constraint_function: natCubicSpline: min_x=0 max_x=0 min_y=0 max_y=0 min_z=0 max_z=0
            x=(-2.094395 -1.22173 -0.5235988 -0.3490659 -0.1745329 0.1591486 2.094395)
            y=(-0.4848236 -0.4683034 -0.4577488 -0.4561426 -0.4549954 -0.4534627 -0.454307)
      SdfastCoordinate knee_angle_r: default_value=0 initial_value=0 range=(-2.094395 0.1745329) q_type=0 index=11
          joint=2 axis=2 constraint_number=-1
      SdfastCoordinate tib_pat_r_tx: default_value=0.04903074 initial_value=0.04903074 range=(-999999.9 999999.9)
          q_type=1 index=12 joint=3 axis=0 constraint_independent_coordinate=knee_angle_r constraint_number=2
        constraint_function: natCubicSpline: min_x=0 max_x=0 min_y=0 max_y=0 min_z=0 max_z=0
            x=(-2.094395 -1.396263 -1.047198 -0.6981317 -0.3490659 -0.1745329 0 0.00017453 0.00034907 0.08726646 2.094395)
            y=(0.01710145 0.03202815 0.03766273 0.04250649 0.04636173 0.04784451 0.04903074 0.04903074 0.04903074 0.04903074 0.04903074)
      SdfastCoordinate tib_pat_r_ty: default_value=-0.02243947 initial_value=-0.02243947 range=(-999999.9 999999.9)
          q_type=1 index=13 joint=3 axis=1 constraint_independent_coordinate=knee_angle_r constraint_number=3
        constraint_function: natCubicSpline: min_x=0 max_x=0 min_y=0 max_y=0 min_z=0 max_z=0
            x=(-2.094395 -1.570796 -1.396263 -1.047198 -0.6981317 -0.3490659 -0.1745329 0 0.00017453 0.00034907 0.08726646 2.094395)
            y=(-0.02164865 -0.01996816 -0.01977046 -0.02016587 -0.02085784 -0.02164865 -0.02204406 -0.02243947 -0.02243947 -0.02243947 -0.02243947 -0.02243947)
      SdfastCoordinate tib_pat_r_r1: default_value=-0.00116916 initial_value=-0.00116916 range=(-999999.9 999999.9)
          q_type=1 index=14 joint=3 axis=2 constraint_independent_coordinate=knee_angle_r constraint_number=4
        constraint_function: natCubicSpline: min_x=0 max_x=0 min_y=0 max_y=0 min_z=0 max_z=0
            x=(-2.094395 -1.999973 -1.457524 -0.5263913 0.02792527 0.1745329)
            y=(0.3080506 0.3080506 0.3063053 0.270177 -0.03700098 -0.2799508)
      SdfastCoordinate ankle_angle_r: default_value=0 initial_value=0 range=(-1.570796 1.570796) q_type=0 index=15
          joint=4 axis=0 constraint_number=-1
      SdfastCoordinate subtalar_angle_r: default_value=0 initial_value=0 range=(-1.570796 1.570796) locked=true
          q_type=2 index=16 joint=5 axis=0 constraint_number=-1
      SdfastCoordinate mtp_angle_r: default_value=0 initial_value=0 range=(-1.570796 1.570796) locked=true q_type=2
          index=17 joint=6 axis=0 constraint_number=-1
      SdfastCoordinate hip_flexion_l: default_value=0 initial_value=0 range=(-2.094395 2.094395) q_type=0 index=18
          joint=7 axis=0 constraint_number=-1
      SdfastCoordinate hip_adduction_l: default_value=0 initial_value=0 range=(-2.094395 2.094395) q_type=0 index=19
          joint=7 axis=1 constraint_number=-1
      SdfastCoordinate hip_rotation_l: default_value=0 initial_value=0 range=(-2.094395 2.094395) q_type=0 index=20
          joint=7 axis=2 constraint_number=-1
      SdfastCoordinate knee_l_tx: default_value=-0.00516241 initial_value=-0.00516241 range=(-999999.9 999999.9)
          q_type=1 index=21 joint=8 axis=0 constraint_independent_coordinate=knee_angle_l constraint_number=5
        constraint_function: natCubicSpline: min_x=0 max_x=0 min_y=0 max_y=0 min_z=0 max_z=0
            x=(-2.094395 -1.745329 -1.396263 -1.047198 -0.6981317 -0.3490659 -0.1745329 0.1973442 0.337395 0.4901776 1.52146 2.094395)
            y=(-0.00367117 0.00205356 0.00471516 0.00470368 0.00243215 -0.00114724 -0.00355644 -0.00599662 -0.00623525 -0.00639472 -0.00623525 -0.00602301)
      SdfastCoordinate knee_l_ty: default_value=-0.4541013 initial_value=-0.4541013 range=(-999999.9 999999.9) q_type=1
          index=22 joint=8 axis=1 constraint_independent_coordinate=knee_angle_l constraint_number=6
        constraint_function: natCubicSpline: min_x=0 max_x=0 min_y=0 max_y=0 min_z=0 max_z=0
            x=(-2.094395 -1.22173 -0.5235988 -0.3490659 -0.1745329 0.1591486 2.094395)
            y=(-0.4848236 -0.4683034 -0.4577488 -0.4561426 -0.4549954 -0.4534627 -0.454307)
      SdfastCoordinate knee_angle_l: default_value=0 initial_value=0 range=(-2.094395 0.1745329) q_type=0 index=23
          joint=8 axis=2 constraint_number=-1
      SdfastCoordinate tib_pat_l_tx: default_value=0.04903074 initial_value=0.04903074 range=(-999999.9 999999.9)
          q_type=1 index=24 joint=9 axis=0 constraint_independent_coordinate=knee_angle_l constraint_number=7
        constraint_function: natCubicSpline: min_x=0 max_x=0 min_y=0 max_y=0 min_z=0 max_z=0
            x=(-2.094395 -1.396263 -1.047198 -0.6981317 -0.3490659 -0.1745329 0 0.00017453 0.00034907 0.08726646 2.094395)
            y=(0.01710145 0.03202815 0.03766273 0.04250649 0.04636173 0.04784451 0.04903074 0.04903074 0.04903074 0.04903074 0.04903074)
      SdfastCoordinate tib_pat_l_ty: default_value=-0.02243947 initial_value=-0.02243947 range=(-999999.9 999999.9)
          q_type=1 index=25 joint=9 axis=1 constraint_independent_coordinate=knee_angle_l constraint_number=8
        constraint_function: natCubicSpline: min_x=0 max_x=0 min_y=0 max_y=0 min_z=0 max_z=0
            x=(-2.094395 -1.570796 -1.396263 -1.047198 -0.6981317 -0.3490659 -0.1745329 0 0.00017453 0.00034907 0.08726646 2.094395)
            y=(-0.02164865 -0.01996816 -0.01977046 -0.02016587 -0.02085784 -0.02164865 -0.02204406 -0.02243947 -0.02243947 -0.02243947 -0.02243947 -0.02243947)
      SdfastCoordinate tib_pat_l_r1: default_value=-0.00116916 initial_value=-0.00116916 range=(-999999.9 999999.9)
          q_type=1 index=26 joint=9 axis=2 constraint_independent_coordinate=knee_angle_l constraint_number=9
        constraint_function: natCubicSpline: min_x=0 max_x=0 min_y=0 max_y=0 min_z=0 max_z=0
            x=(-2.094395 -1.999973 -1.457524 -0.5263913 0.02792527 0.1745329)
            y=(0.3080506 0.3080506 0.3063053 0.270177 -0.03700098 -0.2799508)
      SdfastCoordinate ankle_angle_l: default_value=0 initial_value=0 range=(-1.047198 1.047198) q_type=0 index=27
          joint=10 axis=0 constraint_number=-1
      SdfastCoordinate subtalar_angle_l: default_value=0 initial_value=0 range=(-1.570796 1.570796) locked=true
          q_type=2 index=28 joint=11 axis=0 constraint_number=-1
      SdfastCoordinate mtp_angle_l: default_value=0 initial_value=0 range=(-1.047198 1.047198) locked=true q_type=2
          index=29 joint=12 axis=0 constraint_number=-1
      SdfastCoordinate lumbar_extension: default_value=0 initial_value=0 range=(-1.570796 1.570796) q_type=0 index=30
          joint=13 axis=0 constraint_number=-1
      SdfastCoordinate lumbar_bending: default_value=0 initial_value=0 range=(-1.570796 1.570796) q_type=0 index=31
          joint=13 axis=1 constraint_number=-1
      SdfastCoordinate lumbar_rotation: default_value=0 initial_value=0 range=(-1.570796 1.570796) q_type=0 index=32
          joint=13 axis=2 constraint_number=-1
      SpeedSet:
        SdfastSpeed pelvis_tz_u: default_value=0 index=0 coordinate=pelvis_tz
        SdfastSpeed pelvis_tx_u: default_value=0 index=1 coordinate=pelvis_tx
        SdfastSpeed pelvis_ty_u: default_value=0 index=2 coordinate=pelvis_ty
        SdfastSpeed pelvis_tilt_u: default_value=0 index=3 coordinate=pelvis_tilt
        SdfastSpeed pelvis_list_u: default_value=0 index=4 coordinate=pelvis_list
        SdfastSpeed pelvis_rotation_u: default_value=0 index=5 coordinate=pelvis_rotation
        SdfastSpeed hip_flexion_r_u: default_value=0 index=6 coordinate=hip_flexion_r
        SdfastSpeed hip_adduction_r_u: default_value=0 index=7 coordinate=hip_adduction_r
        SdfastSpeed hip_rotation_r_u: default_value=0 index=8 coordinate=hip_rotation_r
        SdfastSpeed knee_r_tx_u: default_value=0 index=9 coordinate=knee_r_tx
        SdfastSpeed knee_r_ty_u: default_value=0 index=10 coordinate=knee_r_ty
        SdfastSpeed knee_angle_r_u: default_value=0 index=11 coordinate=knee_angle_r
        SdfastSpeed tib_pat_r_tx_u: default_value=0 index=12 coordinate=tib_pat_r_tx
        SdfastSpeed tib_pat_r_ty_u: default_value=0 index=13 coordinate=tib_pat_r_ty
        SdfastSpeed tib_pat_r_r1_u: default_value=0 index=14 coordinate=tib_pat_r_r1
        SdfastSpeed ankle_angle_r_u: default_value=0 index=15 coordinate=ankle_angle_r
        SdfastSpeed subtalar_angle_r_u: default_value=0 index=16 coordinate=subtalar_angle_r
        SdfastSpeed mtp_angle_r_u: default_value=0 index=17 coordinate=mtp_angle_r
        SdfastSpeed hip_flexion_l_u: default_value=0 index=18 coordinate=hip_flexion_l
        SdfastSpeed hip_adduction_l_u: default_value=0 index=19 coordinate=hip_adduction_l
        SdfastSpeed hip_rotation_l_u: default_value=0 index=20 coordinate=hip_rotation_l
        SdfastSpeed knee_l_tx_u: default_value=0 index=21 coordinate=knee_l_tx
        SdfastSpeed knee_l_ty_u: default_value=0 index=22 coordinate=knee_l_ty
        SdfastSpeed knee_angle_l_u: default_value=0 index=23 coordinate=knee_angle_l
        SdfastSpeed tib_pat_l_tx_u: default_value=0 index=24 coordinate=tib_pat_l_tx
        SdfastSpeed tib_pat_l_ty_u: default_value=0 index=25 coordinate=tib_pat_l_ty
        SdfastSpeed tib_pat_l_r1_u: default_value=0 index=26 coordinate=tib_pat_l_r1
        SdfastSpeed ankle_angle_l_u: default_value=0 index=27 coordinate=ankle_angle_l
        SdfastSpeed subtalar_angle_l_u: default_value=0 index=28 coordinate=subtalar_angle_l
        SdfastSpeed mtp_angle_l_u: default_value=0 index=29 coordinate=mtp_angle_l
        SdfastSpeed lumbar_extension_u: default_value=0 index=30 coordinate=lumbar_extension
        SdfastSpeed lumbar_bending_u: default_value=0 index=31 coordinate=lumbar_bending
        SdfastSpeed lumbar_rotation_u: default_value=0 index=32 coordinate=lumbar_rotation
  ActuatorSet:
    SimmDarrylMuscle [values shared by the 54 below unless stated]: muscle_model=9 activation_time_constant=0.01
        deactivation_time_constant=0.04 Vmax=10 Vmax0=5 FmaxTendonStrain=0.033 FmaxMuscleStrain=0.6 KshapeActive=0.5
        KshapePassive=4 damping=0.05 Af=0.3 Flen=1.8
    SimmDarrylMuscle glut_med1_r: groups=(R_hip_abd R_hip_flex R_hip_inrot) max_isometric_force=1119
        optimal_fiber_length=0.05640635 tendon_slack_length=0.08223729 pennation_angle=0.1396263
      MusclePoint: pelvis (-0.04180274 0.03114714 0.1238714)
      MusclePoint: femur_r (-0.02500983 -0.01342271 0.06367182)
    SimmDarrylMuscle glut_med2_r: groups=R_hip_abd max_isometric_force=873 optimal_fiber_length=0.08913177
        tendon_slack_length=0.05590513 pennation_angle=0
      MusclePoint: pelvis (-0.08760134 0.04559368 0.0784826)
      MusclePoint: femur_r (-0.02959879 -0.00665399 0.06045955)
    SimmDarrylMuscle glut_med3_r: groups=(R_hip_abd R_hip_exrot R_hip_ext) max_isometric_force=1000
        optimal_fiber_length=0.06853064 tendon_slack_length=0.05622483 pennation_angle=0.3316126
      MusclePoint: pelvis (-0.1253058 0.01075806 0.06639259)
      MusclePoint: femur_r (-0.03544972 -0.00539203 0.05942703)
    SimmDarrylMuscle bifemlh_r: groups=(R_hip_ext R_hip_add R_knee_bend) max_isometric_force=2700
        optimal_fiber_length=0.1236311 tendon_slack_length=0.369759 pennation_angle=0
      MusclePoint: pelvis (-0.1290557 -0.1050909 0.07114663)
      MusclePoint: tibia_r (-0.02975454 -0.03558683 0.02909223)
      MusclePoint: tibia_r (-0.02313144 -0.05565384 0.03390634)
    SimmDarrylMuscle bifemsh_r: groups=R_knee_bend max_isometric_force=804 optimal_fiber_length=0.1914449
        tendon_slack_length=0.09848899 pennation_angle=0.4014257
      MusclePoint: femur_r (0.0057362 -0.2421824 0.02684542)
      MusclePoint: tibia_r (-0.02975454 -0.03558683 0.02909223)
      MusclePoint: tibia_r (-0.02313144 -0.05565384 0.03390634)
    SimmDarrylMuscle sar_r: groups=(R_hip_flex R_hip_abd R_knee_bend) max_isometric_force=156
        optimal_fiber_length=0.5742156 tendon_slack_length=0.1104261 pennation_angle=0
      MusclePoint: pelvis (-0.01567603 -0.00133195 0.1272525)
      MusclePoint: femur_r (-0.00344172 -0.4093352 -0.0482988)
      MusclePoint: tibia_r (-0.00553573 -0.04141911 -0.03944207)
      MusclePoint: tibia_r (0.00593114 -0.058224 -0.03786043)
      MusclePoint: tibia_r (0.02402111 -0.08303593 -0.02491078)
    SimmDarrylMuscle add_mag2_r: groups=(R_hip_ext R_hip_add) max_isometric_force=2343 optimal_fiber_length=0.1409897
        tendon_slack_length=0.1398245 pennation_angle=0.05235988
      MusclePoint: pelvis (-0.08514235 -0.1221296 0.03155697)
      MusclePoint: femur_r (0.0061951 -0.2621443 0.02604235)
    SimmDarrylMuscle tfl_r: groups=(R_hip_abd R_hip_flex R_hip_inrot) max_isometric_force=233
        optimal_fiber_length=0.1060379 tendon_slack_length=0.4743801 pennation_angle=0.05235988
      MusclePoint: pelvis (-0.03186435 0.02192595 0.12715)
      MusclePoint: femur_r (0.03372886 -0.1141504 0.06849023)
      MusclePoint: femur_r (0.0061951 -0.4645175 0.04095647)
      MusclePoint: tibia_r (0.00593114 -0.04814107 0.02935913)
    SimmDarrylMuscle pect_r: groups=(R_hip_add R_hip_flex) max_isometric_force=266 optimal_fiber_length=0.1116559
        tendon_slack_length=0.03684646 pennation_angle=0
      MusclePoint: pelvis (-0.04415927 -0.07868752 0.04620842)
      MusclePoint: femur_r (-0.01399633 -0.09430313 0.02902517)
    SimmDarrylMuscle grac_r: groups=(R_hip_add R_knee_bend R_hip_flex) max_isometric_force=162
        optimal_fiber_length=0.3965859 tendon_slack_length=0.1419597 pennation_angle=0.05235988
      MusclePoint: pelvis (-0.07582895 -0.1216173 0.02862668)
      MuscleViaPoint: tibia_r (-0.02626506 -0.03153388 -0.03730686) range=(-0.4363323 0.1745329)
          coordinate=knee_angle_r
      MusclePoint: tibia_r (-0.019207 -0.05093859 -0.03538912)
      MusclePoint: tibia_r (0.00593114 -0.08264052 -0.02253832)
    SimmDarrylMuscle glut_max1_r: groups=(R_hip_ext R_hip_abd) max_isometric_force=573 optimal_fiber_length=0.151587
        tendon_slack_length=0.1334393 pennation_angle=0.08726646
      MusclePoint: pelvis (-0.122437 0.06270411 0.07172039)
      MusclePoint: pelvis (-0.1322729 0.00122949 0.09077753)
      MusclePoint: femur_r (-0.05242887 -0.02845155 0.04497181)
      MusclePoint: femur_r (-0.03177855 -0.06493378 0.05392028)
    SimmDarrylMuscle glut_max2_r: groups=R_hip_ext max_isometric_force=819 optimal_fiber_length=0.1593947
        tendon_slack_length=0.1377084 pennation_angle=0
      MusclePoint: pelvis (-0.1382154 0.01803256 0.05768369)
      MusclePoint: pelvis (-0.1409818 -0.05327801 0.09364634)
      MusclePoint: femur_r (-0.04887242 -0.06080372 0.03361413)
      MusclePoint: femur_r (-0.01789694 -0.1165596 0.04806936)
    SimmDarrylMuscle glut_max3_r: groups=R_hip_ext max_isometric_force=552 optimal_fiber_length=0.1562884
        tendon_slack_length=0.1573737 pennation_angle=0.08726646
      MusclePoint: pelvis (-0.1594242 -0.03217172 0.00594255)
      MusclePoint: pelvis (-0.1566578 -0.1077855 0.04129045)
      MusclePoint: femur_r (-0.03430248 -0.1194277 0.01548774)
      MusclePoint: femur_r (-0.00688344 -0.1627934 0.04715156)
    SimmDarrylMuscle iliacus_r: groups=(R_hip_flex R_hip_inrot) max_isometric_force=1073 optimal_fiber_length=0.1061641
        tendon_slack_length=0.1061641 pennation_angle=0.1221731
      MusclePoint: pelvis (-0.06905649 0.03739706 0.08749888)
      MusclePoint: pelvis (-0.02643409 -0.05635174 0.0830932)
      MuscleViaPoint: pelvis (-0.02950782 -0.08247845 0.08360549) range=(-1.570796 0.7853982) coordinate=hip_flexion_r
      MusclePoint: femur_r (0.00195031 -0.06229513 0.00653927)
      MusclePoint: femur_r (-0.02214173 -0.0712436 0.0147994)
    SimmDarrylMuscle psoas_r: groups=(R_hip_flex R_hip_inrot) max_isometric_force=1113 optimal_fiber_length=0.1051723
        tendon_slack_length=0.1682757 pennation_angle=0.1396263
      MusclePoint: pelvis (-0.06629013 0.09087998 0.02961028)
      MusclePoint: pelvis (-0.02438493 -0.05840089 0.0777654)
      MuscleViaPoint: pelvis (-0.02950782 -0.08247845 0.08360549) range=(-1.570796 0.7853982) coordinate=hip_flexion_r
      MusclePoint: femur_r (0.00183558 -0.05816507 0.00435951)
      MusclePoint: femur_r (-0.02156811 -0.06849023 0.0119313)
    SimmDarrylMuscle quad_fem_r: groups=R_hip_exrot max_isometric_force=381 optimal_fiber_length=0.05807418
        tendon_slack_length=0.02581075 pennation_angle=0
      MusclePoint: pelvis (-0.1171092 -0.1179288 0.05327801)
      MusclePoint: femur_r (-0.04370984 -0.04118592 0.04198898)
    SimmDarrylMuscle gem_r: groups=R_hip_exrot max_isometric_force=164 optimal_fiber_length=0.02609439
        tendon_slack_length=0.04240338 pennation_angle=0
      MusclePoint: pelvis (-0.1160846 -0.08401532 0.0731548)
      MusclePoint: femur_r (-0.01629081 -0.00378589 0.05082273)
    SimmDarrylMuscle peri_r: groups=(R_hip_exrot R_hip_abd) max_isometric_force=444 optimal_fiber_length=0.02732926
        tendon_slack_length=0.1208794 pennation_angle=0.1745329
      MusclePoint: pelvis (-0.1430309 0.00030737 0.02407756)
      MusclePoint: pelvis (-0.122232 -0.02827833 0.06731471)
      MusclePoint: femur_r (-0.01697915 -0.00413006 0.05013439)
    SimmDarrylMuscle rect_fem_r: groups=(R_hip_flex R_knee_ext) max_isometric_force=1169 optimal_fiber_length=0.1294757
        tendon_slack_length=0.3520829 pennation_angle=0.08726646
      MusclePoint: pelvis (-0.03022502 -0.03186435 0.09917906)
      MuscleViaPoint: femur_r (0.03831782 -0.4623377 0.00217976) range=(-2.617994 -1.459968) coordinate=knee_angle_r
      MusclePoint: patella_r (0.01295466 0.04678665 -0.00107063)
    SimmDarrylMuscle vas_int_r: groups=R_knee_ext max_isometric_force=5000 optimal_fiber_length=0.1224194
        tendon_slack_length=0.1327163 pennation_angle=0.05235988
      MusclePoint: femur_r (0.03326996 -0.220729 0.03556444)
      MusclePoint: femur_r (0.03843254 -0.2390848 0.03269634)
      MuscleViaPoint: femur_r (0.03935033 -0.4623377 0.00630982) range=(-2.617994 -1.42) coordinate=knee_angle_r
      MusclePoint: patella_r (0.00620967 0.05139037 -0.00064238)
    SimmDarrylMuscle med_gas_r: groups=(R_knee_bend R_ankle_pf) max_isometric_force=2500 optimal_fiber_length=0.0901287
        tendon_slack_length=0.3605148 pennation_angle=0.296706
      MusclePoint: femur_r (-0.02179756 -0.4507506 -0.02696014)
      MuscleViaPoint: femur_r (-0.0344172 -0.4614199 -0.02959879) range=(-0.7853982 0.1745329) coordinate=knee_angle_r
      MusclePoint: calcn_r (0 0.03183963 -0.00544355)
    SimmDarrylMuscle soleus_r: groups=R_ankle_pf max_isometric_force=4000 optimal_fiber_length=0.08046208
        tendon_slack_length=0.2212707 pennation_angle=0.4363323
      MusclePoint: tibia_r (-0.00237246 -0.1515406 0.00701851)
      MusclePoint: calcn_r (0 0.03183963 -0.00544355)
    SimmDarrylMuscle tib_post_r: groups=(R_ankle_pf R_inverter) max_isometric_force=3600
        optimal_fiber_length=0.03107549 tendon_slack_length=0.3107549 pennation_angle=0.2094395
      MusclePoint: tibia_r (-0.00929212 -0.1332529 0.00187819)
      MusclePoint: tibia_r (-0.01423473 -0.4004507 -0.02263718)
      MusclePoint: calcn_r (0.04282943 0.03430463 -0.02937462)
      MusclePoint: calcn_r (0.07929094 0.01633065 -0.02886108)
    SimmDarrylMuscle tib_ant_r: groups=(R_ankle_df R_inverter) max_isometric_force=3000 optimal_fiber_length=0.09791263
        tendon_slack_length=0.2228012 pennation_angle=0.08726646
      MusclePoint: tibia_r (0.01769456 -0.1605361 0.01136801)
      MusclePoint: tibia_r (0.03252241 -0.3905654 -0.01749686)
      MusclePoint: calcn_r (0.1197581 0.01828211 -0.03132609)
    SimmDarrylMuscle glut_med1_l: groups=(L_hip_abd L_hip_flex L_hip_inrot) max_isometric_force=1119
        optimal_fiber_length=0.05640635 tendon_slack_length=0.08223729 pennation_angle=0.1396263
      MusclePoint: pelvis (-0.04180274 0.03114714 -0.1238714)
      MusclePoint: femur_l (-0.02500983 -0.01342271 -0.06367182)
    SimmDarrylMuscle glut_med2_l: groups=L_hip_abd max_isometric_force=873 optimal_fiber_length=0.08913177
        tendon_slack_length=0.05590513 pennation_angle=0
      MusclePoint: pelvis (-0.08760134 0.04559368 -0.0784826)
      MusclePoint: femur_l (-0.02959879 -0.00665399 -0.06045955)
    SimmDarrylMuscle glut_med3_l: groups=(L_hip_abd L_hip_exrot L_hip_ext) max_isometric_force=1000
        optimal_fiber_length=0.06853064 tendon_slack_length=0.05622483 pennation_angle=0.3316126
      MusclePoint: pelvis (-0.1253058 0.01075806 -0.06639259)
      MusclePoint: femur_l (-0.03544972 -0.00539203 -0.05942703)
    SimmDarrylMuscle bifemlh_l: groups=(L_hip_ext L_hip_add L_knee_bend) max_isometric_force=2700
        optimal_fiber_length=0.1236311 tendon_slack_length=0.369759 pennation_angle=0
      MusclePoint: pelvis (-0.1290557 -0.1050909 -0.07114663)
      MusclePoint: tibia_l (-0.02975454 -0.03558683 -0.02909223)
      MusclePoint: tibia_l (-0.02313144 -0.05565384 -0.03390634)
    SimmDarrylMuscle bifemsh_l: groups=L_knee_bend max_isometric_force=804 optimal_fiber_length=0.1914449
        tendon_slack_length=0.09848899 pennation_angle=0.4014257
      MusclePoint: femur_l (0.0057362 -0.2421824 -0.02684542)
      MusclePoint: tibia_l (-0.02975454 -0.03558683 -0.02909223)
      MusclePoint: tibia_l (-0.02313144 -0.05565384 -0.03390634)
    SimmDarrylMuscle sar_l: groups=(L_hip_flex L_hip_abd L_knee_bend) max_isometric_force=156
        optimal_fiber_length=0.5742156 tendon_slack_length=0.1104261 pennation_angle=0
      MusclePoint: pelvis (-0.01567603 -0.00133195 -0.1272525)
      MusclePoint: femur_l (-0.00344172 -0.4093352 0.0482988)
      MusclePoint: tibia_l (-0.00553573 -0.04141911 0.03944207)
      MusclePoint: tibia_l (0.00593114 -0.058224 0.03786043)
      MusclePoint: tibia_l (0.02402111 -0.08303593 0.02491078)
    SimmDarrylMuscle add_mag2_l: groups=(L_hip_ext L_hip_add) max_isometric_force=2343 optimal_fiber_length=0.1409897
        tendon_slack_length=0.1398245 pennation_angle=0.05235988
      MusclePoint: pelvis (-0.08514235 -0.1221296 -0.03155697)
      MusclePoint: femur_l (0.0061951 -0.2621443 -0.02604235)
    SimmDarrylMuscle tfl_l: groups=(L_hip_abd L_hip_flex L_hip_inrot) max_isometric_force=233
        optimal_fiber_length=0.1060379 tendon_slack_length=0.4743801 pennation_angle=0.05235988
      MusclePoint: pelvis (-0.03186435 0.02192595 -0.12715)
      MusclePoint: femur_l (0.03372886 -0.1141504 -0.06849023)
      MusclePoint: femur_l (0.0061951 -0.4645175 -0.04095647)
      MusclePoint: tibia_l (0.00593114 -0.04814107 -0.02935913)
    SimmDarrylMuscle pect_l: groups=(L_hip_add L_hip_flex) max_isometric_force=266 optimal_fiber_length=0.1116559
        tendon_slack_length=0.03684646 pennation_angle=0
      MusclePoint: pelvis (-0.04415927 -0.07868752 -0.04620842)
      MusclePoint: femur_l (-0.01399633 -0.09430313 -0.02902517)
    SimmDarrylMuscle grac_l: groups=(L_hip_add L_knee_bend L_hip_flex) max_isometric_force=162
        optimal_fiber_length=0.3965859 tendon_slack_length=0.1419597 pennation_angle=0.05235988
      MusclePoint: pelvis (-0.07582895 -0.1216173 -0.02862668)
      MuscleViaPoint: tibia_l (-0.02626506 -0.03153388 0.03730686) range=(-0.4363323 0.1745329) coordinate=knee_angle_l
      MusclePoint: tibia_l (-0.019207 -0.05093859 0.03538912)
      MusclePoint: tibia_l (0.00593114 -0.08264052 0.02253832)
    SimmDarrylMuscle glut_max1_l: groups=(L_hip_ext L_hip_abd) max_isometric_force=573 optimal_fiber_length=0.151587
        tendon_slack_length=0.1334393 pennation_angle=0.08726646
      MusclePoint: pelvis (-0.122437 0.06270411 -0.07172039)
      MusclePoint: pelvis (-0.1322729 0.00122949 -0.09077753)
      MusclePoint: femur_l (-0.05242887 -0.02845155 -0.04497181)
      MusclePoint: femur_l (-0.03177855 -0.06493378 -0.05392028)
    SimmDarrylMuscle glut_max2_l: groups=L_hip_ext max_isometric_force=819 optimal_fiber_length=0.1593947
        tendon_slack_length=0.1377084 pennation_angle=0
      MusclePoint: pelvis (-0.1382154 0.01803256 -0.05768369)
      MusclePoint: pelvis (-0.1409818 -0.05327801 -0.09364634)
      MusclePoint: femur_l (-0.04887242 -0.06080372 -0.03361413)
      MusclePoint: femur_l (-0.01789694 -0.1165596 -0.04806936)
    SimmDarrylMuscle glut_max3_l: groups=L_hip_ext max_isometric_force=552 optimal_fiber_length=0.1562884
        tendon_slack_length=0.1573737 pennation_angle=0.08726646
      MusclePoint: pelvis (-0.1594242 -0.03217172 -0.00594255)
      MusclePoint: pelvis (-0.1566578 -0.1077855 -0.04129045)
      MusclePoint: femur_l (-0.03430248 -0.1194277 -0.01548774)
      MusclePoint: femur_l (-0.00688344 -0.1627934 -0.04715156)
    SimmDarrylMuscle iliacus_l: groups=(L_hip_flex L_hip_inrot) max_isometric_force=1073 optimal_fiber_length=0.1061641
        tendon_slack_length=0.1061641 pennation_angle=0.1221731
      MusclePoint: pelvis (-0.06905649 0.03739706 -0.08749888)
      MusclePoint: pelvis (-0.02643409 -0.05635174 -0.0830932)
      MuscleViaPoint: pelvis (-0.02950782 -0.08247845 -0.08360549) range=(-1.570796 0.7853982) coordinate=hip_flexion_l
      MusclePoint: femur_l (0.00195031 -0.06229513 -0.00653927)
      MusclePoint: femur_l (-0.02214173 -0.0712436 -0.0147994)
    SimmDarrylMuscle psoas_l: groups=(L_hip_flex L_hip_inrot) max_isometric_force=1113 optimal_fiber_length=0.1051723
        tendon_slack_length=0.1682757 pennation_angle=0.1396263
      MusclePoint: pelvis (-0.06629013 0.09087998 -0.02961028)
      MusclePoint: pelvis (-0.02438493 -0.05840089 -0.0777654)
      MuscleViaPoint: pelvis (-0.02950782 -0.08247845 -0.08360549) range=(-1.570796 0.7853982) coordinate=hip_flexion_l
      MusclePoint: femur_l (0.00183558 -0.05816507 -0.00435951)
      MusclePoint: femur_l (-0.02156811 -0.06849023 -0.0119313)
    SimmDarrylMuscle quad_fem_l: groups=L_hip_exrot max_isometric_force=381 optimal_fiber_length=0.05807418
        tendon_slack_length=0.02581075 pennation_angle=0
      MusclePoint: pelvis (-0.1171092 -0.1179288 -0.05327801)
      MusclePoint: femur_l (-0.04370984 -0.04118592 -0.04198898)
    SimmDarrylMuscle gem_l: groups=L_hip_exrot max_isometric_force=164 optimal_fiber_length=0.02609439
        tendon_slack_length=0.04240338 pennation_angle=0
      MusclePoint: pelvis (-0.1160846 -0.08401532 -0.0731548)
      MusclePoint: femur_l (-0.01629081 -0.00378589 -0.05082273)
    SimmDarrylMuscle peri_l: groups=(L_hip_exrot L_hip_abd) max_isometric_force=444 optimal_fiber_length=0.02732926
        tendon_slack_length=0.1208794 pennation_angle=0.1745329
      MusclePoint: pelvis (-0.1430309 0.00030737 -0.02407756)
      MusclePoint: pelvis (-0.122232 -0.02827833 -0.06731471)
      MusclePoint: femur_l (-0.01697915 -0.00413006 -0.05013439)
    SimmDarrylMuscle rect_fem_l: groups=(L_hip_flex L_knee_ext) max_isometric_force=1169 optimal_fiber_length=0.1294757
        tendon_slack_length=0.3520829 pennation_angle=0.08726646
      MusclePoint: pelvis (-0.03022502 -0.03186435 -0.09917906)
      MuscleViaPoint: femur_l (0.03831782 -0.4623377 -0.00217976) range=(-2.617994 -1.459968) coordinate=knee_angle_l
      MusclePoint: patella_l (0.01295466 0.04678665 0.00107063)
    SimmDarrylMuscle vas_int_l: groups=L_knee_ext max_isometric_force=5000 optimal_fiber_length=0.1224194
        tendon_slack_length=0.1327163 pennation_angle=0.05235988
      MusclePoint: femur_l (0.03326996 -0.220729 -0.03556444)
      MusclePoint: femur_l (0.03843254 -0.2390848 -0.03269634)
      MuscleViaPoint: femur_l (0.03935033 -0.4623377 -0.00630982) range=(-2.617994 -1.42) coordinate=knee_angle_l
      MusclePoint: patella_l (0.00620967 0.05139037 0.00064238)
    SimmDarrylMuscle med_gas_l: groups=(L_knee_bend L_ankle_pf) max_isometric_force=2500 optimal_fiber_length=0.0901287
        tendon_slack_length=0.3605148 pennation_angle=0.296706
      MusclePoint: femur_l (-0.02179756 -0.4507506 0.02696014)
      MuscleViaPoint: femur_l (-0.0344172 -0.4614199 0.02959879) range=(-0.7853982 0.1745329) coordinate=knee_angle_l
      MusclePoint: calcn_l (0 0.03183963 0.00544355)
    SimmDarrylMuscle soleus_l: groups=L_ankle_pf max_isometric_force=4000 optimal_fiber_length=0.08046208
        tendon_slack_length=0.2212707 pennation_angle=0.4363323
      MusclePoint: tibia_l (-0.00237246 -0.1515406 -0.00701851)
      MusclePoint: calcn_l (0 0.03183963 0.00544355)
    SimmDarrylMuscle tib_post_l: groups=(L_ankle_pf L_inverter) max_isometric_force=3600
        optimal_fiber_length=0.03107549 tendon_slack_length=0.3107549 pennation_angle=0.2094395
      MusclePoint: tibia_l (-0.00929212 -0.1332529 -0.00187819)
      MusclePoint: tibia_l (-0.01423473 -0.4004507 0.02263718)
      MusclePoint: calcn_l (0.04282943 0.03430463 0.02937462)
      MusclePoint: calcn_l (0.07929094 0.01633065 0.02886108)
    SimmDarrylMuscle tib_ant_l: groups=(L_ankle_df L_inverter) max_isometric_force=3000 optimal_fiber_length=0.09791263
        tendon_slack_length=0.2228012 pennation_angle=0.08726646
      MusclePoint: tibia_l (0.01769456 -0.1605361 -0.01136801)
      MusclePoint: tibia_l (0.03252241 -0.3905654 0.01749686)
      MusclePoint: calcn_l (0.1197581 0.01828211 0.03132609)
    SimmDarrylMuscle ercspn_r: groups=(back_ext back_rlb back_introt) max_isometric_force=2500
        optimal_fiber_length=0.1278847 tendon_slack_length=0.03197118 pennation_angle=0
      MusclePoint: pelvis (-0.1434408 0.04497893 0.04467156)
      MusclePoint: torso (-0.05938459 0.1187692 0.02602125)
    SimmDarrylMuscle ercspn_l: groups=(back_ext back_llb back_extrot) max_isometric_force=2500
        optimal_fiber_length=0.1278847 tendon_slack_length=0.03197118 pennation_angle=0
      MusclePoint: pelvis (-0.1434408 0.04497893 -0.04467156)
      MusclePoint: torso (-0.05938459 0.1187692 -0.02602125)
    SimmDarrylMuscle intobl_r: groups=(back_introt back_flex back_rlb) max_isometric_force=900
        optimal_fiber_length=0.106202 tendon_slack_length=0.106202 pennation_angle=0
      MusclePoint: pelvis (-0.04098308 0.07172039 0.1185436)
      MusclePoint: torso (0.07558039 0.1727552 0.0161958)
    SimmDarrylMuscle intobl_l: groups=(back_extrot back_flex back_llb) max_isometric_force=900
        optimal_fiber_length=0.106202 tendon_slack_length=0.106202 pennation_angle=0
      MusclePoint: pelvis (-0.04098308 0.07172039 -0.1185436)
      MusclePoint: torso (0.07558039 0.1727552 -0.0161958)
    SimmDarrylMuscle extobl_r: groups=(back_extrot back_flex back_rlb) max_isometric_force=900
        optimal_fiber_length=0.1263775 tendon_slack_length=0.1474404 pennation_angle=0
      MusclePoint: pelvis (-0.03073731 -0.0651631 0.01024577)
      MusclePoint: torso (0.07018179 0.1187692 0.1187692)
    SimmDarrylMuscle extobl_l: groups=(back_introt back_flex back_llb) max_isometric_force=900
        optimal_fiber_length=0.1263775 tendon_slack_length=0.1474404 pennation_angle=0
      MusclePoint: pelvis (-0.03073731 -0.0651631 -0.01024577)
      MusclePoint: torso (0.07018179 0.1187692 -0.1187692)
